// COMSOL Multiphysics 6.2.0.260 model "hanging_cable.mph"
// Hanging Cable
// A cable is a structural member which has stiffness only in its tangential direction, but virtually no bending stiffness. When supported only at its two ends, it deflects under gravitational load forming a curve known as catenary. This example shows how to model components such as cables, wires or strings using the Wire interface.
// Outline of the model tree
// Components: comp1 "Component 1", comp2 "Component 2"

Parameters
  L_cable = 5.4[m]  // Cable length
  D_cable = 5[mm]  // Cable diameter
  A_cable = pi/4*D_cable^2  // Cable cross section area
  u_support = 0.2[m]  // End point displacement
  d_support = L_cable - 2*u_support  // Support distance
  m_lamp = 0.5[kg]  // Lamp mass
  D_lamp = 400[mm]  // Lamp diameter
  E = 2.0e11[Pa]  // Young's modulus
  rho = 7850[kg/m^3]  // Density
  q_dyn = (1.225[kg/m^3]/2)*(15[m/s])^2  // Dynamic pressure

Functions
  an1: Analytic | funcname = y_catenary; expr = a*(cosh(X/a) - cosh(0.5*d_support/a)); args = {X, a, d_support}; fununit = m; argunit = {m, m, m}

Load and constraint groups
  lg1 "Lamp Weight"
  lg2 "Wind Load"

Geometry
  geom1 "Geometry 1" [comp1] (3D, length unit m)
    pol1: Polygon | source = table; table = {{-L_cable/2, 0, 0}, {L_cable/2, 0, 0}}
    pare1: PartitionEdges | edge = pol1(1) edges 1; param = {0.3, 0.8}
    fin: Finalize "Form Union"

Materials
  mat1: Common "Material 1" [comp1] on all edges
    ElasticWire
      k_A = A_cable*E
      rho_L = rho*A_cable

Physics
  wire: Wire [geom1] on all edges
    dependent variable u = {u, v, w}
    elw1: ElasticWire (default) | ecl = -5e-3; area = A_cable
    free1: Free (default)
    init1: init "Initial Values 1" (default)
      u = {0, 0, (-L_cable/2 + X)*(L_cable/2 + X)*(2/L_cable^2)*sqrt(L_cable^2 - d_support^2)}
    disp1: Displacement0 "Prescribed Displacement 1" on points 1, 4
      Direction = {prescribed, prescribed, prescribed}
      U0 = {-sign(X)*u_support, 0, 0}
    gacc1: GravityAcceleration "Gravity 1"
    el1: EdgeLoad "Edge Load: Wind on Cable" on all edges
      LoadType = TotalForce
      FeTot = {0, 1.1*q_dyn*(L_cable*D_cable), 0}
      loadGroup = lg2
    pl1: PointLoad "Point Load: Wind on Lamps" on points 2, 3 | Fp = {0, 0.45*q_dyn*pi*(D_lamp/2)^2, 0}; loadGroup = lg2
    pm1: PointMass "Point Mass: Lamps" on points 2, 3 | pointmass = if(group.lgLamp, group.lgLamp*m_lamp, 0)
  ge: GlobalEquations "Global ODEs and DAEs" [comp2]
    EquationForm.form = Automatic
    ge1: GlobalEquations
      name = a
      equation = L_cable - 2*a*sinh(d_support/(2*a))
      initialValueU = 3
      initialValueUt = 0
      description = Catenary parameter
      valueType = complex
      fieldName = ODE1
      DependentVariableQuantity = length
      CustomDependentVariableUnit = m
      SourceTermQuantity = length
      CustomSourceTermUnit = m

Mesh
  mesh1 "Mesh 1" [geom1]
    size: MeshSizeDefault | hmax = L_cable/60; hmin = L_cable/60; custom = on
    edg1: Edge on all edges

Studies
  std1 "Study 1"
    stat: Stationary
      useloadcase = on
      loadcase = {Self-weight only, With lamps, With lamps and wind}
      loadgroup = {{off, off}, {on, off}, {on, on}}
      loadgroupweight = {{1.0, 1.0}, {1.0, 1.0}, {1.0, 1.0}}

Solver configurations
  sol1 "Solution 1" (study std1)
    v1: Variables "Dependent Variables 1"
    s1: Stationary "Stationary Solver 1" | stol = 1e-6
      dDef: Direct
      p1: Parametric
      fc1: FullyCoupled | linsolver = dDef; maxiter = 250

Datasets
  dset1: Solution | solution = sol1

Derived values
  gev1: EvalGlobal "Global Evaluation 1" | data = dset1; expr = comp2.a; descr = Catenary parameter

Tables
  mrkvl1: Table "Maximum and Minimum Values"
    // Graph marker
    X+u (m) | Y-coordinate
    1.17506e-15 | -0.890049
    -0.364016 | -0.814287
    -0.364775 | -0.533327
  mrkvl2: Table "Maximum and Minimum Values 1"
    // Graph marker
    X+u (m) | -sqrt(v^2+w^2) (m)
    -0.634688 | -0.794755
  mrkvl3: Table "Maximum and Minimum Values 2"
    // Graph marker
    X-coordinate (m) | Analytic 1 (m)
    -2.22045e-16 | -0.88991

Plots
  pg1: PlotGroup3D "Force (wire)" | data = dset1
    line1: Line | expr = wire.Nxl; linetype = tube; radiusexpr = wire.re; tuberadiusscale = 10
      def: Deform "Deformation" | expr = {u, v, w}; descr = Displacement field
  pg2: PlotGroup1D "Cable Deflection" | data = dset1; xlabel = Current horizontal position (m); ylabel = Displacement (m)
    lngr1: LineGraph on all edges
      expr = w
      xdata = expr
      xdataexpr = X+u
      legends = {Self-weight only, With lamps, With lamps and wind (vertical)}
      gmrk1: GraphMarker | display = min; anchorpoint = lowermiddle; table = mrkvl1
    lngr2: LineGraph on all edges
      data = dset1
      expr = -sqrt(v^2+w^2)
      xdata = expr
      xdataexpr = X+u
      legends = {With lamps and wind (total), , }
      gmrk1: GraphMarker | display = min; anchorpoint = lowermiddle; table = mrkvl2
  pg3: PlotGroup1D "Force" | data = dset1; xlabel = Current horizontal position (m)
    lngr1: LineGraph on all edges | expr = wire.Nxl; xdata = expr; xdataexpr = X+u
  pg4: PlotGroup1D "Analytic vs. Computed Solution"
    data = dset1
    xlabel = Horizontal position (m)
    ylabel = Displacement (m)
    lngr1: LineGraph on all edges
      expr = y_catenary(X, comp2.a, d_support)
      xdata = expr
      xdataexpr = X
      legends = Analytic
      gmrk1: GraphMarker | display = min; anchorpoint = lowermiddle; table = mrkvl3
    lngr2: LineGraph on all edges | expr = w; xdata = expr; xdataexpr = X+u; legends = Computed